# min | avg | max | min | avg | max
# [component: outputs ExpN]
# [component: outputs SymbFit]
# [component: outputs NumFit]
# 1000 loops
# 5 hours
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v3(t) := ((t^5.25 + 0.84)^8.62*t + 0.97)^-1.59
77 %
77 %
v4(t) := ((((0.53*t)^3.02 + 0.85*t)^7*t^2.94 + 0.3*t + 0.65)^8.08 + 0.95)^-2
79 %
t := 0, 0.1 .. 1
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