# min | avg | max | min | avg | max
# [component: outputs Tab]
# [component: outputs Fit]
# [component: outputs FitNUM]
# % | Символьная фитнесс-функция | % | Численная Фитнесс-функция
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v(t) := -76900*t + 89
t := 0, 1*10^-7 .. 1.2*10^-3
# Экспериментальные данные и подобранная кривая
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Pop
